<?xml version="1.0" ?>
<Node dt="0.01" gravity="0 -20 0.0" >
    <RequiredPlugin pluginName="Sofa.Component.Mass"/> <!-- Needed to use components [UniformMass] -->
    <RequiredPlugin pluginName="Sofa.Component.MechanicalLoad"/> <!-- Needed to use components [PlaneForceField] -->
    <RequiredPlugin pluginName="Sofa.Component.IntegrationScheme.Forward"/> <!-- Needed to use components [EulerExplicitIntegrationScheme] -->
    <RequiredPlugin pluginName="Sofa.Component.StateContainer"/> <!-- Needed to use components [MechanicalObject] -->
    <RequiredPlugin pluginName="Sofa.Component.Topology.Container.Grid"/> <!-- Needed to use components [RegularGridTopology] -->
    <RequiredPlugin pluginName="Sofa.Component.Visual"/> <!-- Needed to use components [VisualStyle] -->
    <RequiredPlugin pluginName="SofaSphFluid"/> <!-- Needed to use components [OglFluidModel SPHFluidForceField SpatialGridContainer] -->
    <VisualStyle displayFlags="hideBehaviorModels hideForceFields hideCollisionModels" />

    <DefaultAnimationLoop/>
    <Node name="SPH" >
        <EulerExplicitIntegrationScheme symplectic="1" />
        <RegularGridTopology nx="5" ny="400" nz="5" xmin="-3.0" xmax="0" ymin="-3" ymax="36" zmin="-3.0" zmax="0" />
        <MechanicalObject name="MModel" />
        <!-- A topology is used here just to set initial particles positions. It is a bad idea because this object has no real topology, but it works... -->
        <UniformMass name="M1" vertexMass="1" />
        <SpatialGridContainer cellWidth="0.75" />
        <SPHFluidForceField radius="0.745" density="15" kernelType="1" viscosityType="2" viscosity="10" pressure="1000" surfaceTension="-1000" printLog="0" />
        <!-- The following force fields handle collision with walls and an inclined floor -->
        <PlaneForceField normal="1 0 0" d="-4" />
        <PlaneForceField normal="-1 0 0" d="-4" />
        <PlaneForceField normal="0.5 1 0.1" d="-4" />
        <PlaneForceField normal="0 0 1" d="-10" />
        <PlaneForceField normal="0 0 -1" d="-10" />
    </Node>

    <Node name="Fluid" >
        <OglFluidModel template="Vec3d" position="@../SPH/MModel.position"
            debugFBO="9"
            spriteRadius="0.5" spriteThickness="0.015" spriteBlurRadius="10" spriteBlurScale="10" spriteBlurDepthFalloff="1"  />
    </Node>
</Node>
